1.
A := [5, -1, -1; 1, 2, 3; 4, 3, 2]
B := [0; 14; 16]
A^-1 = [0.166667, 0.0333333, 0.0333333; -0.333333, -0.466667, 0.533333; 0.166667, 0.633333, -0.366667]
X := A^-1*B = [1; 2; 3]
2.
A1 := [0, -1, -1; 14, 2, 3; 16, 3, 2]
Δ[1] := |A1|/|A| = 1
A2 := [5, 0, -1; 1, 14, 3; 4, 16, 2]
Δ[2] := |A2|/|A| = 2
A3 := [5, -1, 0; 1, 2, 14; 4, 3, 16]
Δ[3] := |A3|/|A| = 3
3.
A4 := [6, 4, 5; 4, 3, 1; 5, 2, 3]
B := [2400; 1450; 1550]
A4^-1 = [-0.333333, 0.0952381, 0.52381; 0.333333, 0.333333, -0.666667; 0.333333, -0.380952, -0.0952381]
X := A4^-1*B = [150; 250; 100]
4.
A := [3, 2, 1; 1, 6, 2; 4, 1, 5]
B := [360; 300; 675]
X := A^-1*B = [90; 15; 60]
