f(x) := e^x + x + 1
# [plot: f(x) vs x]
a := -4
b := 0
root(f(x), x, a, b) = -1.27846
f(a) = -2.98168
f(b) = 2
x0 := (a + b)/2 = -2
f(x0) = -0.864665
f(a)*f(x0) = 2.57816
a := x0
x1 := (a + b)/2 = -1
f(x1) = 0.367879
f(a)*f(x1) = -0.318092
b := x1
x2 := (a + b)/2 = -1.5
f(x2) = -0.27687
f(a)*f(x2) = 0.2394
a := x2
x3 := (a + b)/2 = -1.25
f(x3) = 0.0365048
Dihotom(f, a, b, e) :=
    if f(a)*f(b) > 0
        return ∞
    while |b - a| > e
        c ← (a + b)/2
        if f(a)*f(c) > 0
            a ← c
        else
            b ← c
    (a + b)/2
f(a) = -0.27687
f(b) = 0.367879
x := Dihotom(f, a, b, 0.001) = -1.27881
y := Dihotom(f, 10, 11, 0.001) = 1e307
Fib(n) :=
    if n < 2
        return n
    a ← 0
    b ← 1
    for i ∈ 1 .. n
        c ← a + b
        b ← a
        a ← c
    c
Fib(2) = 1
Fib(3) = 2
Fib(4) = 3
Fib(5) = 5
Fib(1000) = 4.34666e208
